P_2 := 7.25*10^6
P_а := 0.02*10^6
# 3. Построение газодинамического тракта
I_уп := 3609.98
P_п := 700
F`_кр := 0.0002523
F`_а := 0.0099085
m_р := P_п*10^3/I_уп = 193.907
φ_с := 0.98
F_кр := F`_кр*m_р = 0.0489227
φ_β := 0.98
F_крд := F_кр/φ_с = 0.0499211
φ := φ_с*φ_β = 0.9604
F_а := F`_а*m_р = 1.92133
F_ад := F_а/φ_с^2 = 2.00055
L_пр := 1.5
V_кс := L_пр*F_крд = 0.0748817
d_кс := round(nthroot(4*V_кс/π, 3), 3) = 0.457
L_кс := d_кс = 0.457
R_кр := round(sqrt(F_крд/π), 3) = 0.126
D_кр := 2*R_кр = 0.252
R_а := round(sqrt(F_ад/π), 4) = 0.798
R_а*2 = 1.596
R_с1 := 0.25*d_кс = 0.11425
R_с2 := 0.7*D_кр = 0.1764
R_с3 := 0.45*R_кр = 0.0567
R_а/R_кр = 6.33333
L_a := 15.5*R_кр = 1.953
# 5. Расчет смесительной головки
ρ_о := 1135
ρ_г := 424
υ := 3.5504
m_р = 193.907
m_др := m_р/φ = 201.902
m_дг := m_др/(1 + υ) = 44.3702
m_до := υ*m_др/(1 + υ) = 157.532
m_дг + m_до = 201.902
# 5.2 Расчет струйных форсунок для пристеночного слоя.
d_кс = 0.457
ρ_г = 424
m_дг = 44.3702
Δp_фг := 2*10^6
n_сф := π*(d_кс - 0.016)/0.015 = 92.3628
μ_ф := 0.65
m_сфг := 0.05*m_дг/n_сф = 0.0240195
F_сфг := m_сфг/(μ_ф*sqrt(2*Δp_фг*ρ_г)) = 8.97301e-7
ω_г := μ_ф*sqrt(2*Δp_фг/ρ_г) = 63.1336
d_сфг := round(sqrt(4*F_сфг/π), 4) = 0.0011
# 5.3 Расчет центробежных форсунок
# 5.3.1. Форсунки горючего
n_цфг := 187
m_цфг := 0.95*m_дг/n_цфг = 0.22541
Δp_ф := 2*10^6
μ_ф := 0.42
F_сг := m_цфг/(μ_ф*sqrt(2*Δp_ф*ρ_г)) = 1.3032e-5
A := 1
d_сг := round(sqrt(4*F_сг/π), 3) = 0.004
r_сг := d_сг/2 = 0.002
i := 2
R_вх := 1.1*r_сг = 0.0022
m_вх := m_цфг/i = 0.112705
Динамическая
r_вх := round(sqrt(R_вх*r_сг/(i*A)), 4) = 0.0015
вязкость
d_вх := 2*r_вх = 0.003
η := 102.8*10^-6
Re_вх := 4*m_цфг/(η*π*d_вх*sqrt(i)) = 658043
Для_правильной_работы_маткада
lg(λ) := 25.8/log(Re_вх)^2.58 - 2 = -1.72556
λ := 0
λ := 10^lg(λ) = 0.0188124
log(0.02) = -1.69897
A_э := R_вх*r_сг/(i*r_вх^2 + λ/2*R_вх*(R_вх - r_сг)) = 0.976879
|(A - A_э)/A|*100 = 2.31207
l_вх := 1.1*d_вх = 0.0033
l_сг := 0.5*d_сг = 0.002
h := R_вх = 0.0022
R_з := R_вх + r_вх = 0.0037
R_фг := round(sqrt(R_з^2 + l_вх^2 + 2*l_вх*sqrt(R_з^2 - R_вх^2)), 4) = 0.0066
δ := R_фг - R_з = 0.0029
# 5.3.2. Форсунки окислителя
n_цфо := 424
m_цфо := m_до/n_цфо = 0.371538
m_цфо = 0.371538
ρ_о = 1135
Δp_ф := 2*10^6
μ_ф := 0.42
F_со := m_цфо/(μ_ф*sqrt(2*Δp_ф*ρ_о)) = 1.31288e-5
A := 1
d_со := round(sqrt(4*F_со/π), 3) = 0.004
r_со := d_со/2 = 0.002
i := 3
R_вх := 1.1*r_со = 0.0022
m_вх := m_цфо/i = 0.123846
Динамическая
r_вх := round(sqrt(R_вх*r_со/(i*A)), 4) = 0.0012
вязкость
d_вх := 2*r_вх = 0.0024
η := 190*10^-6
Re_вх := 4*m_цфо/(η*π*d_вх*sqrt(i)) = 598946
Для_правильной_работы_маткада
lg(λ) := 25.8/log(Re_вх)^2.58 - 2 = -1.72052
λ := 0
λ := 10^lg(λ) = 0.0190319
A_э := R_вх*r_со/(i*r_вх^2 + λ/2*R_вх*(R_вх - r_со)) = 1.01753
|(A - A_э)/A|*100 = 1.75323
l_вх := 1.1*d_вх = 0.00264
l_со := 0.5*d_со = 0.002
h := R_вх = 0.0022
R_з := R_вх + r_вх = 0.0034
R_фо := round(sqrt(R_з^2 + l_вх^2 + 2*l_вх*sqrt(R_з^2 - R_вх^2)), 4) = 0.0057
δ := R_фо - R_з = 0.0023
# 5.4 Проверка радиусов форсунок
R_фо + R_фг = 12.3*10^-3  # м
# 6. Расчет турбонасосного агрегата
ΔP_охл := 0.5*10^6
ΔP_ф := 2*10^6
P_подг := P_2 + ΔP_охл + ΔP_ф = 9750000
P_подо := P_2 + ΔP_ф = 9250000
P_нд := 0.5*10^6
P_вх := 0.5*10^6
P_sг := 10^5
P_sо := 10^5
# 6.1 Расчет насосов
Q_г := m_дг/ρ_г = 0.104647
H_г := (P_подг - P_вх)/ρ_г = 21816
c_кр := 4000
ω_maxг := c_кр*((P_вх - P_sг)/ρ_г)^(3/4)/(298*sqrt(Q_г)) = 7063.2
Q_о := m_до/ρ_о = 0.138795
H_о := (P_подо - P_вх)/ρ_о = 7709.25
c_кр := 4000
ω_maxо := c_кр*((P_вх - P_sо)/ρ_о)^(3/4)/(298*sqrt(Q_о)) = 2930.59
ω_о := 0.95*ω_maxо = 2784.06
ω_г := 0.95*ω_maxг = 6710.04
ω_min := ω_о
ω := ω_min = 2784.06
n_sг := 193.3*ω*sqrt(Q_г)/H_г^(3/4) = 96.9821
n_sо := 193.3*ω*sqrt(Q_о)/H_о^(3/4) = 243.69
η_о := 0.9
η_г := 0.7
η_м := 0.85
η_н := η_о*η_г*η_м = 0.5355
N_нг := Q_г*H_г*ρ_г/η_н = 1807623
M_кр1 := N_нг/ω = 649.275
N_но := Q_о*H_о*ρ_о/η_о = 1349393
M_кр2 := N_но/ω = 484.685
M_кр := M_кр1 + M_кр2 = 1133.96
τ := 9.4*10^8
d_в := nthroot(5.1*M_кр/τ, 3) = 0.0183237
d_вт := 1.2*d_в = 0.0219885
# 6.2. Расчет насоса горючего
Q_од := Q_г/η_о = 0.116274
k_о := 5
D_1э := 0.47*k_о*nthroot(Q_од/ω, 3) = 0.0815335
D_о := sqrt(D_1э^2 + d_вт^2) = 0.0844464
D_1 := D_о = 0.0844464
c_о := Q_од/(π/4*D_1э^2) = 22.2701
b_1 := 0.375*D_1э^2/D_1 = 0.0295204
u_1 := D_1*ω/2 = 117.552
ψ_1 := 0.85
Здесь_надо_варировать  # ψ_1
δ_1 := 0.003
чтобы_была_близка_к_конечной
z := 12
c_1m := Q_од/(π*D_1*b_1*ψ_1) = 17.4667
β_1 := atan(c_1m/u_1) = 0.147508
β_1 = 8.45158°
Δβ_л := 15° = 0.261799
β_1л := β_1 + Δβ_л = 23.4516°
β_1л = 0.409307
ψ_1 := 1 - δ_1*z/(π*D_1*sin(β_1л)) = 0.659029
c_1m := Q_од/(π*D_1*b_1*ψ_1) = 22.5281
Δβ_л := 15° = 0.261799
β_1 := atan(c_1m/u_1) = 0.189348
β_1 = 10.8488°
β_1л := β_1 + Δβ_л = 0.451148
β_1л = 25.8488°
k_н := 0.5
u_2 := sqrt(H_г/(k_н*η_г)) = 249.663
D_2' := 2*u_2/ω = 0.179351
β_2 := 60°
z := 6.5*(D_2' + D_1)/(D_2' - D_1)*sin((β_1л + β_2)/2) = 12.3045
z := round(z) = 12
c_2m := c_1m
ψ_2 := 1 - δ_1*z/(π*D_2'*sin(β_2)) = 0.926224
b_2 := Q_од/(π*D_2'*c_2m*ψ_2) = 0.00988979
ψ := 0.6 + 0.6*sin(β_2) = 1.11962
p := 2*ψ/z*1/(1 - (D_1/D_2')^2) = 0.239755
H_T∞ := H_г/η_г*(1 + p) = 38637.9
u_2 := c_2m/(2*tan(β_2)) + sqrt((c_2m/(2*tan(β_2)))^2 + H_T∞) = 203.176
D_21' := 2*u_2/ω = 0.145957
γ := |(D_21' - D_2')/D_21'|*100 = 22.88
z := 6.5*(D_21' + D_1)/(D_21' - D_1)*sin((β_1л + β_2)/2) = 16.5815
z := round(z) = 17
ψ_2 := 1 - δ_1*z/(π*D_21'*sin(β_2)) = 0.87157
b_2 := Q_од/(π*D_21'*c_2m*ψ_2) = 0.0129146
ψ := 0.6 + 0.6*sin(β_2) = 1.11962
p := 2*ψ/z*1/(1 - (D_1/D_21')^2) = 0.197999
H_T∞ := H_г/η_г*(1 + p) = 37336.5
u_2 := c_2m/(2*tan(β_2)) + sqrt((c_2m/(2*tan(β_2)))^2 + H_T∞) = 199.839
D_22' := 2*u_2/ω = 0.14356
γ := |(D_22' - D_21')/D_22'|*100 = 1.6697
# 6.3 Расчет насоса горючего
Q_од := Q_о/η_о = 0.154216
k_о := 5
D_1э := 0.47*k_о*nthroot(Q_од/ω, 3) = 0.0895815
D_о := sqrt(D_1э^2 + d_вт^2) = 0.0922407
D_1 := D_о = 0.0922407
c_о := Q_од/(π/4*D_1э^2) = 24.4683
b_1 := 0.375*D_1э^2/D_1 = 0.0326246
u_1 := D_1*ω/2 = 128.402
ψ_1 := 0.85
Здесь_надо_варировать  # ψ_1
δ_1 := 0.003
чтобы_была_близка_к_конечной
z := 6
c_1m := Q_од/(π*D_1*b_1*ψ_1) = 19.1908
β_1 := atan(c_1m/u_1) = 0.148361
β_1 = 8.50045°
Δβ_л := 15° = 0.261799
β_1л := β_1 + Δβ_л = 23.5005°
β_1л = 0.41016
ψ_1 := 1 - δ_1*z/(π*D_1*sin(β_1л)) = 0.844227
c_1m := Q_од/(π*D_1*b_1*ψ_1) = 19.3221
Δβ_л := 15° = 0.261799
β_1 := atan(c_1m/u_1) = 0.14936
β_1 = 8.55773°
β_1л := β_1 + Δβ_л = 0.41116
β_1л = 23.5577°
k_н := 0.5
u_2 := sqrt(H_о/(k_н*η_о)) = 130.888
D_2' := 2*u_2/ω = 0.0940266
β_2 := 30°
z := 6.5*(D_2' + D_1)/(D_2' - D_1)*sin((β_1л + β_2)/2) = 305.432
z := round(z) = 305
c_2m := c_1m
ψ_2 := 1 - δ_1*z/(π*D_2'*sin(β_2)) = -5.19513
b_2 := Q_од/(π*D_2'*c_2m*ψ_2) = -0.00520092
ψ := 0.6 + 0.6*sin(β_2) = 0.9
p := 2*ψ/z*1/(1 - (D_1/D_2')^2) = 0.156842
H_T∞ := H_о/η_о*(1 + p) = 9909.31
u_2 := c_2m/(2*tan(β_2)) + sqrt((c_2m/(2*tan(β_2)))^2 + H_T∞) = 117.676
D_21' := 2*u_2/ω = 0.0845351
γ := |(D_21' - D_2')/D_21'|*100 = 11.2279
z := 6.5*(D_21' + D_1)/(D_21' - D_1)*sin((β_1л + β_2)/2) = -67.1856
z := round(z) = -67
ψ_2 := 1 - δ_1*z/(π*D_21'*sin(β_2)) = 2.5137
b_2 := Q_од/(π*D_21'*c_2m*ψ_2) = 0.0119558
ψ := 0.6 + 0.6*sin(β_2) = 0.9
p := 2*ψ/z*1/(1 - (D_1/D_21')^2) = 0.140945
H_T∞ := H_о/η_о*(1 + p) = 9773.14
u_2 := c_2m/(2*tan(β_2)) + sqrt((c_2m/(2*tan(β_2)))^2 + H_T∞) = 116.999
D_22' := 2*u_2/ω = 0.084049
γ := |(D_22' - D_21')/D_22'|*100 = 0.578445
# 7. ЖГГ, Турбина ТНА
N_нг = 1807623
N_но = 1349393
N_т := N_нг + N_но = 3157016
Т_гг := 1200.02
p_вхд := 7.25*10^6
p_вых := 6.894*10^6
R := 624.552
γ := 1.14698
L_ад := γ/(γ - 1)*R*Т_гг*(1 - (p_вых/p_вхд)^(γ/(γ - 1))) = 1900298
c_ад := sqrt(2*L_ад) = 1949.51
u := 0.2*c_ад = 389.902
ω = 2784.06
r := u/ω = 0.140048
d := 2*r = 0.280096
η_т := 0.425
m_гг := N_т/(L_ад*η_т) = 3.909
ν_гг := 0.7584
m_огг := ν_гг*m_гг/(1 + ν_гг) = 1.68596
m_ггг := 1*m_гг/(1 + ν_гг) = 2.22305
m_огг + m_ггг = 3.909
# 8. Построение высотной и дроссельной характеристик ЖРД
β := 1828.92
P_п = 700
P_2 = 7250000
K_п := P_п*10^3/(F_крд*P_2) = 1.93409
P_н := 0.10132
P_з(m) := K_п*β*m - F_ад*P_н*10^6
K_п*β = 3537.29
F_ад*P_н*10^6 = 202696
P_пп(m) := K_п*β*m
m_р = 193.907
m_min := 0.18*P_н*10^6*F_кр*P_2/(β*P_а) = 176.844
# Дроссельная характеристика
# [plot: P_з(m), P_пп(m) vs m]
# P | -P_з(m)  -P_пп(m)
m
# [Excel component]
    H := excel["A2:A31"]
    p := excel["B2:B31"]
P_п = 700
F_ад = 2.00055
P := P_п*10^3 - p*F_ад
max(P) = 700000
# [plot: P vs H]
P
H
